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CPI_ALU := 1.1
CPI_BJ := 3.0
r_h := 60%
t_h := 1
t_m := 120
AMAT := r_h*t_h + (1 - r_h)*t_m = 48.6
CPI := (22 + 12)%*AMAT + 20%*CPI_BJ + (100 - (22 + 12) - 20)%*CPI_ALU = 17.63
CPI = 17.63
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f_1 := 1 GHz
CPI_1 := 1.2
L_1 := CPI_1*1/f_1 = 1.2e-9 s
f_2 := 2 GHz
CPI_2 := 2
L_2 := CPI_2*1/f_2 = 1e-9 s
speedup := L_1/L_2 = 1.2
# As we can see in the calculations above, processor 1's latency is greater than processor 2's latency. Throwing it into the speedup equation, we see that it's 1.2. Since the speedup is greater than 1, it also indicates that L_1 is greater than L_2 which is consistent with our calculations.
#
# In terms of latency, we want lower because it means that the processor is able to complete tasks more quickly, therefore we want processor 2.
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# Let's say that with the new tech implemented, program execution takes 1 minute. From this we know that 30s is spent waiting on memory and the other 30s is spent on other operations
L_2 := 60 s
t_m2 := 30 s
t_r := 30 s
# With a speedup of 3.5, we know the following:
t_m1 := 3.5*t_m2 = 105 s
t_t1 := t_m1 + t_r = 135 s
t_m1/t_t1 = 0.777778
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x := 60%
p_1 := 1
p_2 := 2
L_1 := CPI_1*1/f_1 = 1.2e-9 s
S_par := 1/(x/p_2 + (1 - x)) = 1.42857
L_2 := CPI_2*1/f_2 = 1e-9 s
# Assuming our IC is the same, we know latency can be calculated as follows:
L == CPI*1/f
# Assuming CPI is also the same, we'll solve for frequency:
solve block
    # guess values
    f_1 := 1 GHz
    f_2 := 1 GHz
    # constraints
    S_par == 1/f_1/(1/f_2)
    # solver
    [f_1; f_2] := find(f_1, f_2) = [1; 1.42857] GHz
end solve block
1/1.429 = 0.69979  # You'd have to reduce the frequency by 0.7
