bit := 1
byte := 1
KB := 1024 byte
MB := 1024 KB
GB := 1024 MB
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# 1) 32-bit OS, 4-KB pages, 1 GB of RAM
OS := 32 bit
page := 4 KB = 4096 byte
RAM := 1 GB = 1073741824 byte
VA := OS = 32 bit
PA := log(RAM, 2) = 30 bit
offset := log(page, 2) = 12 bit
VPN := VA - offset = 20 bit
PPN := PA - offset = 18 bit
# 2) 32-bit OS, 16-KB pages, 2 GB of RAM
OS := 32 bit
page := 16 KB = 16384 byte
RAM := 2 GB = 2147483648 byte
VA := OS = 32 bit
PA := log(RAM, 2) = 31 bit
offset := log(page, 2) = 14 bit
VPN := VA - offset = 18 bit
PPN := PA - offset = 17 bit
# 3. 64-bit OS, 16-KB pages, 16 GB of RAM
OS := 64 bit
page := 16 KB = 16384 byte
RAM := 16 GB = 17179869184 byte
VA := OS = 64 bit
PA := log(RAM, 2) = 34 bit
offset := log(page, 2) = 14 bit
VPN := VA - offset = 50 bit
PPN := PA - offset = 20 bit
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# Pros:
#
# - Larger pages means less pages are needed to cover the same amount of physical memory. Less pages means smaller page table.
# - Less page faults.
# Cons:
#
# - Greater waste for small data requests. If a program requests a small amount of memory relative to the page size, we could be wasting a lot of space.
# - Hit miss penalty worsens. If we miss, it takes more to load in a different page.
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